// `Substrate.` is a namespace root of its own and the only producer of a
// Substrate value, which only a Substrate pin accepts.

export void M_Substrate(inout material m)
{
    m.FrontMaterial = Substrate.Unlit(EmissiveColor = float3(0.1, 0.6, 1.0));
}
